<Lems>

    <Target component="sim_c302_A_Syns" />

    <!-- Include core NeuroML2 ComponentType definitions -->

    <Include file="Cells.xml" />
    <Include file="Networks.xml" />
    <Include file="Simulation.xml" />

    <Include file="c302_A_Syns.nml" />

    <!-- End of NeuroML2 content -->

    <Simulation id="sim_c302_A_Syns" length="500.0ms" step="0.1ms" target="c302_A_Syns">

        <Display id="d0" title="c302_A_Syns: Membrane potential of a number of cells" timeScale="1ms" xmin="-50.0" xmax="550.0" ymin="-72.0" ymax="-48.0">

            <Line id="ADAL" quantity="ADAL/0/generic_iaf_cell/v" scale="1mV" color="#f9c945" timeScale="1ms" />
            <Line id="AIBL" quantity="AIBL/0/generic_iaf_cell/v" scale="1mV" color="#edf6f9" timeScale="1ms" />
            <Line id="RIVR" quantity="RIVR/0/generic_iaf_cell/v" scale="1mV" color="#7b40e5" timeScale="1ms" />
            <Line id="RMEV" quantity="RMEV/0/generic_iaf_cell/v" scale="1mV" color="#41bf61" timeScale="1ms" />

        </Display>

        <OutputFile id="of0" fileName="c302_A_Syns.dat">
            <OutputColumn id="ADAL_v" quantity="ADAL/0/generic_iaf_cell/v"/>
            <OutputColumn id="AIBL_v" quantity="AIBL/0/generic_iaf_cell/v"/>
            <OutputColumn id="RIVR_v" quantity="RIVR/0/generic_iaf_cell/v"/>
            <OutputColumn id="RMEV_v" quantity="RMEV/0/generic_iaf_cell/v"/>
        </OutputFile>

    </Simulation>

</Lems>
