<Lems>

    <!--
${comment}
    -->

    <Target component="sim_${reference}" />

    <!-- Include core NeuroML2 ComponentType definitions -->

    <Include file="Cells.xml" />
    <Include file="Networks.xml" />
    <Include file="Simulation.xml" />

    <Include file="${reference}.nml" />

    <!-- End of NeuroML2 content -->

#set( $start = -0.1 * $duration )
#set( $end = 1.1 * $duration )

    <Simulation id="sim_${reference}" length="${duration}ms" step="${dt}ms" target="${reference}">

        <Display id="d0" title="${reference}: Membrane potential of a number of cells" timeScale="1ms" xmin="$start" xmax="$end" ymin="$vmin" ymax="$vmax">

#foreach ($plot in $plots)##
            <Line id="${plot.cell}" quantity="${plot.cell}/0/${cell_component}/v" scale="1mV" color="${plot.colour}" timeScale="1ms" />
#end##

        </Display>

        <OutputFile id="of0" fileName="${reference}.dat">
#foreach ($cell in $cells)##
            <OutputColumn id="${cell}_v" quantity="${cell}/0/${cell_component}/v"/>
#end##
        </OutputFile>

    </Simulation>

</Lems>
